*Heading
** Job name: 50-0 Model name: 50-0
** Generated by: Abaqus/CAE 6.14-2
*Preprint, echo=NO, model=NO, history=NO, contact=NO
**
** PARTS
**
*Part, name=con
*End Part
**
*Part, name=steel
*End Part
**
**
** ASSEMBLY
**
*Assembly, name=Assembly
**
*Instance, name=con-1, part=con
*Node
      1,           0.,        -200.,        2107.
      2,   187.100006,        -200.,        2107.
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*Element, type=C3D8R
  1,  102,  627, 1213,  277,    1,   13,  235,   32
  2,  627,  628, 1214, 1213,   13,   14,  236,  235
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*Nset, nset=Set-con, generate
    1,  2187,     1
*Elset, elset=Set-con, generate
    1,  1612,     1
** Section: con
*Solid Section, elset=Set-con, material=con
,
*End Instance
**
*Instance, name=steel-1, part=steel
*Node
      1,           0.,   387.100006,        2107.
      2,   187.100006,         200.,        2107.
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*Element, type=S4R
  1,   1,   9, 143,  68
  2,   9,  10, 144, 143
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*Nset, nset=Set-steel, generate
   1,  567,    1
*Elset, elset=Set-steel, generate
   1,  520,    1
*Orientation, name=Ori-6
1., 0., 0., 0., 1., 0.
1, 0.
** Section: steel
*Shell Section, elset=Set-steel, material=steel, orientation=Ori-6, offset=SNEG
12.9, 5
*End Instance
**
*Node
      1,           0.,           0.,           0.
*Node
      2,           0.,           0.,        2107.
*Nset, nset=LOAD1
 1,
*Nset, nset=LOAD2
 2,
*Nset, nset=Set-J1, instance=con-1
    5,    6,    7,    8,   10,   11
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*Nset, nset=Set-J1, instance=steel-1
   3,   4,   6,   8,  39,  40
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*Elset, elset=Set-J1, instance=con-1
  801,  802,  803,  804,  805,  806
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*Elset, elset=Set-J1, instance=steel-1
 151, 152, 153, 154, 155, 156
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*Nset, nset=Set-J2, instance=con-1
    1,    2,    3,    4,    9,   12
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*Nset, nset=Set-J2, instance=steel-1
   1,   2,   5,   7,   9,  10
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*Elset, elset=Set-J2, instance=con-1
    1,    2,    3,    4,    5,    6
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*Elset, elset=Set-J2, instance=steel-1
   1,   2,   3,   4,   5,   6
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*Nset, nset=Set-YZ-C, instance=con-1
    1,    4,    7,    8,    9,   10
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*Elset, elset=Set-YZ-C, instance=con-1
    1,    5,    9,   13,   17,   21
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*Nset, nset=Set-YZ-S, instance=steel-1
   1,   4,   7,   8,  44,  45
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*Elset, elset=Set-YZ-S, instance=steel-1
   1,   7,  13,  19,  25,  31
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*Elset, elset=_m_Surf-1_SNEG, internal, instance=steel-1, generate
   1,  520,    1
*Surface, type=ELEMENT, name=m_Surf-1
_m_Surf-1_SNEG, SNEG
*Elset, elset=_s_Surf-1_S4, internal, instance=con-1
    4,    8,   12,   16,   20,   24
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*Elset, elset=_s_Surf-1_S3, internal, instance=con-1
  989,  990,  991,  992,  993,  994
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*Elset, elset=_s_Surf-1_S2, internal, instance=con-1
 1184, 1185, 1186, 1187, 1188, 1189
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*Surface, type=ELEMENT, name=s_Surf-1
_s_Surf-1_S4, S4
_s_Surf-1_S3, S3
_s_Surf-1_S2, S2
*Surface, type=NODE, name=Set-J1_CNS_, internal
Set-J1, 1.
*Surface, type=NODE, name=Set-J2_CNS_, internal
Set-J2, 1.
** Constraint: Constraint-1
*Coupling, constraint name=Constraint-1, ref node=LOAD1, surface=Set-J1_CNS_
*Kinematic
** Constraint: Constraint-2
*Coupling, constraint name=Constraint-2, ref node=LOAD2, surface=Set-J2_CNS_
*Kinematic
*End Assembly
**
** MATERIALS
**
*Material, name=con
*Elastic
30094., 0.2
*Concrete Damaged Plasticity
36.,    0.1,   1.16, 0.6667,  1e-06
*Concrete Compression Hardening
  23.0316,          0.
  25.5147, 0.000127275
  27.8147, 0.000170631
  31.8649, 0.000275566
  35.1817, 0.000404814
  39.6128, 0.000736322
  40.2614, 0.000834422
  40.7261, 0.000938616
   41.007,   0.0010489
  41.1039,  0.00116529
  41.0622,  0.00128627
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 0.970599,     0.22552
*Concrete Tension Stiffening, type=GFI
 3.587,5.
*Material, name=steel
*Elastic
200000., 0.3
*Plastic
 53.3476,          0.
 66.6889, 1.37974e-07
 80.0321, 1.06969e-06
 93.3773, 4.16783e-06
 106.725, 1.26518e-05
 120.076, 3.30115e-05
 133.433, 7.72633e-05
 146.799, 0.000166213
 160.182, 0.000333992
 173.594, 0.000634139
 187.056,  0.00114754
   200.6,  0.00199251
  245.52,   0.0107495
 295.995,   0.0356894
 355.795,   0.0801964
 428.944,    0.144627
  519.75,    0.227334
 573.194,    0.274656
 632.787,    0.325389
  665.08,    0.351894
 699.139,    0.379082
 735.044,    0.406898
 772.873,    0.435285
 792.534,    0.449677
 812.707,    0.464191
 833.401,    0.478821
 854.626,    0.493562
**
** INTERACTION PROPERTIES
**
*Surface Interaction, name=IntProp-1
1.,
*Friction, slip tolerance=0.005, taumax=1.12
 0.3,
*Surface Behavior, pressure-overclosure=HARD
**
** BOUNDARY CONDITIONS
**
** Name: BC-3 Type: Displacement/Rotation
*Boundary
LOAD1, 1, 1
LOAD1, 2, 2
LOAD1, 4, 4
LOAD1, 5, 5
LOAD1, 6, 6
** Name: BC-4 Type: Displacement/Rotation
*Boundary
LOAD2, 1, 1
LOAD2, 2, 2
LOAD2, 3, 3
LOAD2, 4, 4
LOAD2, 5, 5
LOAD2, 6, 6
** Name: YZ-C Type: Displacement/Rotation
*Boundary
Set-YZ-C, 1, 1
** Name: YZ-S Type: Symmetry/Antisymmetry/Encastre
*Boundary
Set-YZ-S, XSYMM
**
** INTERACTIONS
**
** Interaction: Int-1
*Contact Pair, interaction=IntProp-1, type=SURFACE TO SURFACE, adjust=0.0
s_Surf-1, m_Surf-1
** ----------------------------------------------------------------
**
** STEP: Step-1
**
*Step, name=Step-1, nlgeom=YES, inc=1000000
*Static
0.002, 1., 1e-07, 0.02
**
** BOUNDARY CONDITIONS
**
** Name: BC-5 Type: Displacement/Rotation
*Boundary
LOAD1, 3, 3, 30.
**
** CONTROLS
**
*Controls, reset
*Controls, parameters=time incrementation
40, 80, , , , , 120, , , ,
*Controls, parameters=field, field=displacement
0.03, 0.03, , , , , ,
*Controls, parameters=field, field=hydrostatic fluid pressure
0.03, 0.03, , , , , ,
*Controls, parameters=field, field=rotation
0.03, 0.03, , , , , ,
*Controls, parameters=field, field=electrical potential
0.03, 0.03, , , , , ,
**
** OUTPUT REQUESTS
**
*Restart, write, frequency=0
**
** FIELD OUTPUT: F-Output-1
**
*Output, field, variable=PRESELECT
**
** HISTORY OUTPUT: H-Output-1
**
*Output, history, variable=PRESELECT
*End Step
